<Lems>

  <!-- Tell jLEMS/jNeuroML which component is the simulation entry point. -->
  <Target component="sim_JansenRit_LEMS_Export"/>

  <!-- ════════════════════════════════════════════════════════════════
       Dimensions & Units (inline — no external includes needed)
       ════════════════════════════════════════════════════════════════ -->

  <!-- Dimensions -->
  <Dimension name="none"/>
  <Dimension name="time" t="1"/>
  <Dimension name="voltage" m="1" l="2" t="-3" i="-1"/>
  <Dimension name="per_time" t="-1"/>
  <Dimension name="conductance" m="-1" l="-2" t="3" i="2"/>
  <Dimension name="capacitance" m="-1" l="-2" t="4" i="2"/>
  <Dimension name="current" i="1"/>
  <Dimension name="resistance" m="1" l="2" t="-3" i="-2"/>
  <Dimension name="concentration" l="-3" n="1"/>
  <Dimension name="substance" n="1"/>
  <Dimension name="charge" t="1" i="1"/>
  <Dimension name="temperature" k="1"/>

  <!-- Units -->
  <Unit symbol="s" dimension="time" power="0"/>
  <Unit symbol="ms" dimension="time" power="-3"/>
  <Unit symbol="us" dimension="time" power="-6"/>
  <Unit symbol="V" dimension="voltage" power="0"/>
  <Unit symbol="mV" dimension="voltage" power="-3"/>
  <Unit symbol="A" dimension="current" power="0"/>
  <Unit symbol="mA" dimension="current" power="-3"/>
  <Unit symbol="nA" dimension="current" power="-9"/>
  <Unit symbol="pA" dimension="current" power="-12"/>
  <Unit symbol="S" dimension="conductance" power="0"/>
  <Unit symbol="mS" dimension="conductance" power="-3"/>
  <Unit symbol="nS" dimension="conductance" power="-9"/>
  <Unit symbol="F" dimension="capacitance" power="0"/>
  <Unit symbol="uF" dimension="capacitance" power="-6"/>
  <Unit symbol="nF" dimension="capacitance" power="-9"/>
  <Unit symbol="ohm" dimension="resistance" power="0"/>
  <Unit symbol="Mohm" dimension="resistance" power="6"/>
  <Unit symbol="per_s" dimension="per_time" power="0"/>
  <Unit symbol="per_ms" dimension="per_time" power="3"/>
  <Unit symbol="degC" dimension="temperature" offset="273.15"/>
  <Unit symbol="K" dimension="temperature" power="0"/>

  <!-- ════════════════════════════════════════════════════════════════
       LEMS Simulation infrastructure types
       (normally provided by Simulation.xml — defined inline to avoid
       the jNeuroML double-read bug)
       ════════════════════════════════════════════════════════════════ -->
  <ComponentType name="Simulation">
    <Parameter name="length" dimension="time"/>
    <Parameter name="step" dimension="time"/>
    <Children name="outputs" type="OutputFile"/>
    <ComponentReference name="target" type="Component"/>
    <Dynamics>
      <StateVariable name="t" dimension="time"/>
    </Dynamics>
    <Simulation>
      <Run component="target" variable="t" increment="step" total="length"/>
    </Simulation>
  </ComponentType>

  <ComponentType name="OutputFile">
    <Children name="outputColumn" type="OutputColumn"/>
    <Text name="fileName"/>
    <Text name="path"/>
    <Simulation>
      <DataWriter path="path" fileName="fileName"/>
    </Simulation>
  </ComponentType>

  <ComponentType name="OutputColumn">
    <Path name="quantity"/>
    <Simulation>
      <Record quantity="quantity"/>
    </Simulation>
  </ComponentType>

  <!-- ════════════════════════════════════════════════════════════════
       Dynamics ComponentType & Component instances
       ════════════════════════════════════════════════════════════════ -->

  <!-- ════════════════════════════════════════════════════════════════
       ComponentType: JansenRit
       Generated from TVBO Dynamics: JansenRit
       ════════════════════════════════════════════════════════════════ -->
  <ComponentType name="JansenRit">

    <!-- Parameters -->
    <Parameter name="A" dimension="none"/>
    <Parameter name="B" dimension="none"/>
    <Parameter name="J" dimension="none"/>
    <Parameter name="a_1" dimension="none"/>
    <Parameter name="a_2" dimension="none"/>
    <Parameter name="a_3" dimension="none"/>
    <Parameter name="a_4" dimension="none"/>
    <Parameter name="a" dimension="none"/>
    <Parameter name="b" dimension="none"/>
    <Parameter name="mu" dimension="none"/>
    <Parameter name="nu_max" dimension="none"/>
    <Parameter name="r" dimension="none"/>
    <Parameter name="v0" dimension="none"/>
    <!-- Coupling inputs -->
    <Parameter name="c_pop0" dimension="none"/>
    <Parameter name="local_coupling" dimension="none"/>
    <!-- Initial condition parameters -->
    <Parameter name="y0_0" dimension="none"/>
    <Parameter name="y1_0" dimension="none"/>
    <Parameter name="y2_0" dimension="none"/>
    <Parameter name="y3_0" dimension="none"/>
    <Parameter name="y4_0" dimension="none"/>
    <Parameter name="y5_0" dimension="none"/>

    <!-- Time constant for derivatives: normalises 1/ms → dimensionless rate.
         Value matches integration.time_scale so equations stay numerically correct. -->
    <Constant name="SEC" dimension="time" value="1ms"/>

    <!-- Exposures (one per state variable) -->
    <Exposure name="y0" dimension="none"/>
    <Exposure name="y1" dimension="none"/>
    <Exposure name="y2" dimension="none"/>
    <Exposure name="y3" dimension="none"/>
    <Exposure name="y4" dimension="none"/>
    <Exposure name="y5" dimension="none"/>

    <Dynamics>

      <!-- State variables -->
      <StateVariable name="y0" dimension="none" exposure="y0"/>
      <StateVariable name="y1" dimension="none" exposure="y1"/>
      <StateVariable name="y2" dimension="none" exposure="y2"/>
      <StateVariable name="y3" dimension="none" exposure="y3"/>
      <StateVariable name="y4" dimension="none" exposure="y4"/>
      <StateVariable name="y5" dimension="none" exposure="y5"/>

      <!-- Derived variables (simple and conditional/piecewise) -->
      <DerivedVariable name="sigma_y0_1" dimension="none" value="2.0*nu_max/(1.0 + exp(r*(v0 - J*a_1*y0)))"/>
      <DerivedVariable name="sigma_y0_3" dimension="none" value="2.0*nu_max/(1.0 + exp(r*(v0 - J*a_3*y0)))"/>
      <DerivedVariable name="sigma_y1_y2" dimension="none" value="2.0*nu_max/(1.0 + exp(r*(v0 + y2 - y1)))"/>

      <!-- Time derivatives -->
      <TimeDerivative variable="y0" value="(y3) / SEC"/>
      <TimeDerivative variable="y1" value="(y4) / SEC"/>
      <TimeDerivative variable="y2" value="(y5) / SEC"/>
      <TimeDerivative variable="y3" value="(-y0*a^2 - 2.0*a*y3 + A*a*sigma_y1_y2) / SEC"/>
      <TimeDerivative variable="y4" value="(-y1*a^2 - 2.0*a*y4 + A*a*(c_pop0 + mu + local_coupling*(y1 - y2) + J*a_2*sigma_y0_1)) / SEC"/>
      <TimeDerivative variable="y5" value="(-y2*b^2 - 2.0*b*y5 + B*J*a_4*b*sigma_y0_3) / SEC"/>

      <!-- Initial conditions -->
      <OnStart>
        <StateAssignment variable="y0" value="y0_0"/>
        <StateAssignment variable="y1" value="y1_0"/>
        <StateAssignment variable="y2" value="y2_0"/>
        <StateAssignment variable="y3" value="y3_0"/>
        <StateAssignment variable="y4" value="y4_0"/>
        <StateAssignment variable="y5" value="y5_0"/>
      </OnStart>

      <!-- Events (spike / reset) -->

    </Dynamics>

  </ComponentType>

  <!-- ════════════════════════════════════════════════════════════════
       Coupling ComponentType
       Provides pre/post expressions + global coupling parameter.
       The DerivedParameter c_pop0 is the coupling input consumed by
       the dynamics ComponentType's coupling_inputs.
       ════════════════════════════════════════════════════════════════ -->
  <ComponentType name="Coupling">
    <Parameter name="global_coupling" dimension="none"/>
    <Parameter name="a" dimension="none"/>
    <Parameter name="b" dimension="none"/>
    <Dynamics>
      <DerivedVariable name="pre"  dimension="none" value="x_j"/>
      <DerivedVariable name="gx"   dimension="none" value="global_coupling * pre"/>
      <DerivedVariable name="post" dimension="none" value="b + a*gx"/>
      <DerivedVariable name="c_pop0" dimension="none" value="post"/>
    </Dynamics>
  </ComponentType>

  <!-- ════════════════════════════════════════════════════════════════
       Component instances (default parameter values)
       ════════════════════════════════════════════════════════════════ -->
  <Component id="JansenRit_inst" type="JansenRit" A="3.25" B="22.0" J="135.0" a_1="1.0" a_2="0.8" a_3="0.25" a_4="0.25" a="0.1" b="0.05" mu="0.22" nu_max="0.0025" r="0.56" v0="5.52" c_pop0="0" local_coupling="0" y0_0="0.1" y1_0="0.1" y2_0="0.1" y3_0="0.1" y4_0="0.1" y5_0="0.1"/>

  <Component id="coupling" type="Coupling" global_coupling="0.00390625" a="0.00390625" b="0.0"/>

  <!-- ════════════════════════════════════════════════════════════════
       Simulation — target the component instance directly.
       Output: one file with all state variables.
       ════════════════════════════════════════════════════════════════ -->
  <Simulation id="sim_JansenRit_LEMS_Export" length="1000.0ms" step="0.01220703125ms" target="JansenRit_inst">

    <OutputFile id="of1" fileName="results/JansenRit.dat">
      <OutputColumn id="y0" quantity="y0"/>
      <OutputColumn id="y1" quantity="y1"/>
      <OutputColumn id="y2" quantity="y2"/>
      <OutputColumn id="y3" quantity="y3"/>
      <OutputColumn id="y4" quantity="y4"/>
      <OutputColumn id="y5" quantity="y5"/>
    </OutputFile>

  </Simulation>

</Lems>
